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/batch
! ANSYS input file written by Workbench version 2024 R1
! File used for geometry attach: C:\Users\asus\AppData\Local\Temp\WB_asus_29168_2\wbnew_files\dp0\SYS\DM\SYS.scdoc
/title,wbnew--Static Structural (A5)
/COM,/COM,     ANSYSMotion, 2024.1
/com,--- Data in consistent NMM units. See Solving Units in the help system for more information.
/units,MPA
/prep7
! Turn off shape checking because checks already performed inside WB mesher.
! See help system for more information.
SHPP,OFF,,NOWARN
etcon,set             ! allow ANSYS to choose best KEYOP's for 180x elements, resets any applicable keyopt to MAPDL defaults
/com,*********** Nodes for the whole assembly ***********
nblock,3,,2399
(1i9,3e20.9e3)
        1     1.374125874E+02     1.250000000E+02     1.250000000E+02
        2     1.374125874E+02     1.250000000E+02     2.500000000E+02
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-1
/com,*********** Elements for Body 1 "SYS\Boss-Extrude1" ***********
et,1,186
keyo,1,2,1          ! set full integration on SOLID186
eblock,19,solid,,352
(19i9)
        1        1        1        1        0        0        0        0       20        0        1        1      362      335      324      168      489      334      325
      626     1661     1640      625     1300     1659     1642     1299      624     1735     1658     1638
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-1
/com,*********** Send User Defined Coordinate System(s) ***********
csys,0
toffst,273.15,  ! Temperature offset from absolute zero
/com,*********** Set Reference Temperature ***********
tref,22.
/com,*********** Send Materials ***********
Temperature = 'TEMP' ! Temperature
MP,DENS,1,7.85e-09,	! tonne mm^-3
MP,ALPX,1,1.2e-05,	! C^-1
MP,C,1,434000000,	! mm^2 s^-2 C^-1
MP,KXX,1,60.5,	! tonne mm s^-3 C^-1
MP,RSVX,1,0.00017,	! ohm mm
MP,EX,1,200000,	! tonne s^-2 mm^-1
MP,NUXY,1,0.3,
MP,MURX,1,10000,

!************************* Model Summary ********************
!SYS\Boss-Extrude1,	Structural Steel,	matid,	1
!************************* End Model Summary ********************
/com,*********** Send Named Selection as Element Component ***********
esel,s,type,,1
cm,NONE,elem
esel,all
/com,*********** Fixed Supports ***********
CMBLOCK,_FIXEDSU,NODE,       69
(8i10)
       225       226       227       318       319       320       321       322
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cmsel,s,_FIXEDSU
d,all,all
nsel,all
/com,*********** Define Force Using Surface Effect Elements ***********
local,12,0,0.,0.,0.,0.,0.,0.
csys,0
et,2,154
mat,2
eblock,10,,,104
(15i9)
      825        2        2        2       12      327      526      621      326     1646     2012     1644     1643
      826        2        2        2       12      328      538      526      327     1648     2011     1646     1645
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-1
esel,s,type,,2
keyop,2,2,1                ! Apply load in local coordinate system
keyop,2,7,1                ! Use original area so load is constant in large deformation
esel,all
/com,*********** Define Force Using Surface Effect Elements ***********
local,13,0,0.,0.,0.,0.,0.,0.
csys,0
et,3,156
mat,3
keyop,3,5,1         !  No orientation node
eblock,10,,,8
(15i9)
      929        3        3        3       13      303      302     1590
      930        3        3        3       13      303      304     1592
      931        3        3        3       13      304      305     1594
      932        3        3        3       13      305      306     1596
      933        3        3        3       13      306      307     1598
      934        3        3        3       13      307      308     1600
      935        3        3        3       13      308      309     1602
      936        3        3        3       13      309      228     1444
-1
esel,s,type,,3
keyop,3,2,1                ! Apply load in local coordinate system
keyop,3,7,1                ! Use original area so load is constant in large deformation
esel,all
/com,*********** Define Force Using Surface Effect Elements ***********
local,14,0,0.,0.,0.,0.,0.,0.
csys,0
et,4,156
mat,4
keyop,4,5,1         !  No orientation node
eblock,10,,,8
(15i9)
      937        4        4        4       14      311      310     1605
      938        4        4        4       14      311      312     1607
      939        4        4        4       14      312      313     1609
      940        4        4        4       14      313      314     1611
      941        4        4        4       14      314      315     1613
      942        4        4        4       14      315      316     1615
      943        4        4        4       14      316      317     1617
      944        4        4        4       14      317      237     1461
-1
esel,s,type,,4
keyop,4,2,1                ! Apply load in local coordinate system
keyop,4,7,1                ! Use original area so load is constant in large deformation
esel,all
fini
/com,****************************************************************************
/com,*************************    SOLUTION       ********************************
/com,****************************************************************************
/solu
antype,0                   ! static analysis
_thickRatio=  0     ! Ratio of thick parts in the model
eqsl,sparse,,,,,1
cntr,print,1               ! print out contact info and also make no initial contact an error
cncheck,dmp		!	Enable program controlled contact splitting for distributed memory parallel run
dmpoption,emat,no             ! Don't combine emat file for DANSYS
dmpoption,esav,no             ! Don't combine esav file for DANSYS
nldiag,cont,iter           ! print out contact info each equilibrium iteration
rescontrol,,none                 ! Do not keep any restart files
/com,****************************************************
/com,******************* SOLVE FOR LS 1 OF 1 ****************
esel,s,type,,2
nsle
sfe,all,1,pres,1,0.
sfe,all,2,pres,1,-1.6666666666668e-002
sfe,all,3,pres,1,0.
esel,s,type,,3
nsle
sfe,all,1,pres,1,0.
sfe,all,2,pres,1,-50.
sfe,all,3,pres,1,0.
esel,s,type,,4
nsle
sfe,all,1,pres,1,0.
sfe,all,2,pres,1,-40.
sfe,all,3,pres,1,0.
nsel,all
esel,all
nsub,1,1,1
time,1.
outres,erase
outres,all,none
outres,nsol,all,
outres,rsol,all
outres,eangl,all
outres,etmp,all
outres,veng,all
outres,strs,all,
outres,epel,all,
outres,eppl,all,
outres,cont,all,
! *********** WB SOLVE COMMAND ***********
! check interactive state
*get,ANSINTER_,active,,int
*if,ANSINTER_,ne,0,then
/eof
*endif
solve
/com *************** Write FE CONNECTORS *********
CEWRITE,file,ce,,INTE
/com,****************************************************
/com,*************** FINISHED SOLVE FOR LS 1 *************
*get,_NSOLTHREADS,active,0,ntfs
*get,_NSOLPROCESSES,active,0,npfs
/post1
fini
